*Heading
** Job name: Job-1 Model name: Model-1
** Generated by: Abaqus/CAE 2020
*Preprint, echo=NO, model=NO, history=NO, contact=NO
**
** PARTS
**
*Part, name=Part-1
*Node
      1,          -8.,         0.75,  0.200000003
      2,          -9.,         0.75,  0.200000003
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*Element, type=C3D8R
 1,   8,  84, 551,  90,   1,  73, 545,  82
 2,  84,  83, 552, 551,  73,  74, 546, 545
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*Nset, nset=Set-1, generate
    1,  1826,     1
*Elset, elset=Set-1, generate
   1,  820,    1
*Elset, elset=U3
   1,   2,   3,   4,   5,   6
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*Elset, elset=U4
 335, 336, 337, 338, 339, 340
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*Elset, elset=U5
 662, 663, 664, 665, 666, 667
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*Elset, elset=U6
 485, 486, 487, 488, 489, 490
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*Elset, elset=U7
 185, 186, 187, 188, 189, 190
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*Elset, elset=_BondBase_S2, internal
  1,  2,  3,  4,  5,  6
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*Elset, elset=_BondBase_S1, internal
 31, 32, 33, 34, 35, 36
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*Surface, type=ELEMENT, name=BondBase
_BondBase_S2, S2
_BondBase_S1, S1
*Elset, elset=_prac2_S6, internal
 185, 186, 187, 188, 189, 190
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*Elset, elset=_prac2_S1, internal, generate
  85,  184,    1
*Surface, type=ELEMENT, name=prac2
_prac2_S6, S6
_prac2_S1, S1
*Elset, elset=_contbase_S1, internal
   1,   2,   3,   4,   5,   6
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*Elset, elset=_contbase_S2, internal
   1,   2,   3,   4,   5,   6
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*Elset, elset=_contbase_S4, internal
   3,   6,   9,  12,  66,  69
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*Elset, elset=_contbase_S6, internal
  31,  34,  37,  40,  52,  55
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*Surface, type=ELEMENT, name=contbase
_contbase_S1, S1
_contbase_S2, S2
_contbase_S4, S4
_contbase_S6, S6
** Section: Section-1
*Solid Section, elset=Set-1, material=Material-1
,
*End Part
**
*Part, name=Part-2
*Node
      1,          -8.,        -0.75,           0.
      2,          -8.,        -0.75,  0.200000003
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*Element, type=C3D8R
1,  50,  54, 380, 377,   1,   2,  41,  42
2, 377, 380,  53,  45,  42,  41,   3,   4
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*Nset, nset=Set-1, generate
   1,  878,    1
*Elset, elset=Set-1, generate
   1,  350,    1
*Nset, nset=strippool, generate
 33,  36,   1
*Elset, elset=_Bondstrip_S6, internal
  1,  2,  3,  4,  5,  6,  7,  8, 17, 18, 19, 20, 21, 22, 23, 24
*Elset, elset=_Bondstrip_S5, internal, generate
 25,  32,   1
*Elset, elset=_Bondstrip_S4, internal, generate
  9,  16,   1
*Surface, type=ELEMENT, name=Bondstrip
_Bondstrip_S6, S6
_Bondstrip_S5, S5
_Bondstrip_S4, S4
*Elset, elset=_prac_S2, internal, generate
  33,  350,    1
*Surface, type=ELEMENT, name=prac
_prac_S2, S2
*Elset, elset=_contstrip_S1, internal
   7,   8,  15,  16,  23,  24
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*Elset, elset=_contstrip_S2, internal
   1,   2,   9,  10,  17,  18
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*Elset, elset=_contstrip_S3, internal
  25,  26,  27,  28,  29,  30
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*Elset, elset=_contstrip_S4, internal
   1,   2,   3,   4,   5,   6
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*Elset, elset=_contstrip_S5, internal
   2,   4,   6,   8,  12,  14
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*Elset, elset=_contstrip_S6, internal
   1,   2,   3,   4,   5,   6
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*Surface, type=ELEMENT, name=contstrip
_contstrip_S1, S1
_contstrip_S2, S2
_contstrip_S4, S4
_contstrip_S6, S6
_contstrip_S3, S3
_contstrip_S5, S5
** Section: Section-1
*Solid Section, elset=Set-1, material=Material-1
,
*End Part
**
**
** ASSEMBLY
**
*Assembly, name=Assembly
**
*Instance, name=Part-1-1, part=Part-1
*End Instance
**
*Instance, name=Part-2-1, part=Part-2
          0.,           0.,          0.2
*End Instance
**
*Nset, nset=BC_bottom, instance=Part-1-1, generate
 49,  52,   1
** Constraint: Constraint-1
*Tie, name=Constraint-1, adjust=yes
Part-2-1.Bondstrip, Part-1-1.BondBase
*End Assembly
**
** MATERIALS
**
*Material, name=Material-1
*Elastic
50000., 0.3
**
** INTERACTION PROPERTIES
**
*Surface Interaction, name=IntProp-1
1.,
*Friction, slip tolerance=0.005
 0.2,
*Surface Interaction, name=IntProp-2
1.,
*Surface Behavior, pressure-overclosure=HARD
**
** CONTACT INITIALIZATION DATA
**
*Contact Initialization Data, name=CInit-1
**
** BOUNDARY CONDITIONS
**
** Name: BC-1 Type: Symmetry/Antisymmetry/Encastre
*Boundary
BC_bottom, ENCASTRE
**
** INTERACTIONS
**
** Interaction: Int-1
*Contact Pair, interaction=IntProp-1, type=SURFACE TO SURFACE
Part-2-1.Bondstrip, Part-1-1.contbase
** Interaction: Int-2
*Contact Pair, interaction=IntProp-1, type=SURFACE TO SURFACE
Part-2-1.prac, Part-1-1.prac2
** ----------------------------------------------------------------
**
** STEP: Step-3
**
*Step, name=Step-3, nlgeom=YES
*Static
1., 1., 1e-05, 1.
**
** BOUNDARY CONDITIONS
**
** Name: BC-2 Type: Displacement/Rotation
*Boundary
Part-2-1.strippool, 3, 3, 2.
**
** INTERACTIONS
**
** Interaction: Int-2
*Model Change, type=CONTACT PAIR, remove
Part-2-1.prac, Part-1-1.prac2
**
** OUTPUT REQUESTS
**
*Restart, write, frequency=0
**
** FIELD OUTPUT: F-Output-3
**
*Output, field, variable=PRESELECT
**
** HISTORY OUTPUT: H-Output-1
**
*Output, history, variable=PRESELECT
*End Step
** ----------------------------------------------------------------
**
** STEP: Step-4
**
*Step, name=Step-4, nlgeom=YES
*Static
1., 1., 1e-05, 1.
**
** BOUNDARY CONDITIONS
**
** Name: BC-1 Type: Symmetry/Antisymmetry/Encastre
*Boundary, op=NEW
BC_bottom, ENCASTRE
** Name: BC-2 Type: Displacement/Rotation
*Boundary, op=NEW
**
** INTERACTIONS
**
** Interaction: Int-2
*Model Change, type=CONTACT PAIR, add
Part-2-1.prac, Part-1-1.prac2
**
** OUTPUT REQUESTS
**
*Restart, write, frequency=0
**
** FIELD OUTPUT: F-Output-3
**
*Output, field, variable=PRESELECT
**
** HISTORY OUTPUT: H-Output-1
**
*Output, history, variable=PRESELECT
*End Step
