*Heading
Three-dimensional magnetic body
************************************************************************
** this input file is for UEL subroutine uMag.for
**    1. user needs to define applied magnetic field:
**       unit directional vector and magnitude.
**    2. user needs to define material's mechanical properties:
**       shear modulus (Gshear) and bulk modulus (Kbulk).
**    3. user needs to define material's magnetic moment density:
**       components along x,y,z directions.
**
**	UNITS:	Length - meters, Force - Newtons,
**		Stress - Newton/meter^2 = Pa, Mass - kilograms,
**		Density - kg/meter^3, Energy - Joules
**
**  model description:
**  beam actuation with single magnetization direction (1,0,0)
**  and applied magnetic field along (0,1,0)
**
**  Implemented in Abaqus 2016
**  Created by Ruike Zhao, 2017
**  Please refer to paper "Printing ferromagnetic domains
**  for untethered fast-transforming soft materials, Nature(2018)"
************************************************************************
*Parameter
**
** final magnitude of the applied magnetic field (Tesla)
magFieldMag = 0.00015
magFieldMag1 = 0.0
**
** applied magnetic field unit vector
magFieldVecX = 0.0
magFieldVecY = 0.0
magFieldVecZ = 1.0
**
**	MATERIAL PARAMETERS
**
** initial magnetic moment density (A/m)
Mx = 100.0
My = 0.0
Mz = 0.0
**
** initial shear modulus (Pa)
Gshear = 0.33
**
** bulk modulus (Pa)
Kbulk = 1000.0*Gshear
**
** number of body integration points
nInt = 8
**
** number of real material properties
nProps = 5
**
** number of integer material properties
nJProps = 1
**
************************************************************************
**		MODEL DEFINITION
************************************************************************
**
*PART, NAME=Part-1
*Node, nset=Nall
      1,          -8.,         0.75,  0.200000003
      2,          -9.,         0.75,  0.200000003
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*User Element,Nodes=8,Type=U3,Iproperties=<nJProps>,Properties=<nProps>,Coordinates=3,Unsymm
1,2,3
*Element, type=U3
1,	8,	84,	551,	90,	1,	73,	545,	82
2,	84,	83,	552,	551,	73,	74,	546,	545
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*User Element,Nodes=8,Type=U4,Iproperties=<nJProps>,Properties=<nProps>,Coordinates=3,Unsymm
1,2,3
*Element, type=U4
335,	195,	190,	1165,	1039,	47,	45,	333,	360
336,	1039,	1165,	1166,	1040,	360,	333,	334,	359
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*User Element,Nodes=8,Type=U5,Iproperties=<nJProps>,Properties=<nProps>,Coordinates=3,Unsymm
1,2,3
*Element, type=U5
662,	534,	535,	1693,	1567,	69,	70,	477,	504
663,	1567,	1693,	1694,	1568,	504,	477,	478,	503
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*User Element,Nodes=8,Type=U6,Iproperties=<nJProps>,Properties=<nProps>,Coordinates=3,Unsymm
1,2,3
*Element, type=U6
485,	97,	104,	1417,	1291,	10,	12,	393,	420
486,	1291,	1417,	1418,	1292,	420,	393,	394,	419
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*User Element,Nodes=8,Type=U7,Iproperties=<nJProps>,Properties=<nProps>,Coordinates=3,Unsymm
1,2,3
*Element, type=U7
185,	330,	331,	913,	787,	57,	58,	273,	300
186,	787,	913,	914,	788,	300,	273,	274,	299
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*Nset, nset=beam1, generate
  1,  1826,   1
*Elset, elset=beam1, generate
  1,  820,   1
**==========================================================================
** Make the Dummy Mesh
**
*Element, type=C3D8R, elset=ElDummy1
1001,	8,	84,	551,	90,	1,	73,	545,	82
1002,	84,	83,	552,	551,	73,	74,	546,	545
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*Elset, elset=_BondBase_S2, internal
1001,	1002,	1003,	1004,	1005,	1006
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*Elset, elset=_BondBase_S1, internal
1031,	1032,	1033,	1034,	1035,	1036
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*Surface, type=ELEMENT, name=BondBase
_BondBase_S2, S2
_BondBase_S1, S1
*Elset, elset=_contbase_S1, internal
1001,	1002,	1003,	1004,	1005,	1006
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*Elset, elset=_contbase_S2, internal
1001,	1002,	1003,	1004,	1005,	1006
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*Elset, elset=_contbase_S4, internal
1003,	1006,	1009,	1012,	1066,	1069
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*Elset, elset=_contbase_S6, internal
1003,	1006,	1009,	1012,	1066,	1069
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*Surface, type=ELEMENT, name=contbase
_contbase_S1, S1
_contbase_S2, S2
_contbase_S4, S4
_contbase_S6, S6
*END PART
**
*Part, name=Part-2
*Node, nset=Nall2
      1,          -8.,        -0.75,           0.
      2,          -8.,        -0.75,  0.200000003
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*User Element,Nodes=8,Type=U8,Iproperties=<nJProps>,Properties=<nProps>,Coordinates=3,Unsymm
1,2,3
*Element, type=U8
1,  50,  54, 380, 377,   1,   2,  41,  42
2, 377, 380,  53,  45,  42,  41,   3,   4
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*Nset, nset=beam2, generate
  1,  878,   1
*Elset, elset=beam2, generate
  1,  350,   1
**==========================================================================
** Make the Dummy Mesh
**
*Element, type=C3D8R, elset=ElDummy2
2001,	50,	54,	380,	377,	1,	2,	41,	42
2002,	377,	380,	53,	45,	42,	41,	3,	4
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*Nset, nset=Set-1, generate
   1,  878,    1
*Nset, nset=strippool, generate
 33,  36,   1
*Elset, elset=Set-1, generate
   2001,  2350,    1
*Elset, elset=_Bondstrip_S6, internal
  2001,  2002,  2003,  2004,  2005,  2006,  2007,  2008, 2017, 2018, 2019, 2020, 2021, 2022, 2023, 2024
*Elset, elset=_Bondstrip_S5, internal, generate
 2025,  2032,   1
*Elset, elset=_Bondstrip_S4, internal, generate
  2009,  2016,   1
*Surface, type=ELEMENT, name=Bondstrip
_Bondstrip_S6, S6
_Bondstrip_S5, S5
_Bondstrip_S4, S4
*Elset, elset=_contstrip_S1, internal
2007,	2008,	2015,	2016,	2023,	2024
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*Elset, elset=_contstrip_S2, internal
2007,	2008,	2015,	2016,	2023,	2024
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*Elset, elset=_contstrip_S3, internal
2025,	2026,	2027,	2028,	2029,	2030
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*Elset, elset=_contstrip_S4, internal
2001,	2002,	2003,	2004,	2005,	2006
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*Elset, elset=_contstrip_S5, internal
2002,	2004,	2006,	2008,	2012,	2014
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*Elset, elset=_contstrip_S6, internal
2001,	2002,	2003,	2004,	2005,	2006
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*Surface, type=ELEMENT, name=contstrip
_contstrip_S1, S1
_contstrip_S2, S2
_contstrip_S4, S4
_contstrip_S6, S6
_contstrip_S3, S3
_contstrip_S5, S5
*End Part
** ASSEMBLY
**
*Assembly, name=Assembly
**
*Instance, name=Part-1-1, part=Part-1
**
** Material properties for the real material
**
*uel property,elset=beam1
<Gshear>,<Kbulk>,<Mx>,<My>,<Mz>,<nInt>
**
** Dummy mesh material properties
**
*Solid section, elset=ElDummy1, material=Material-2
**
*End Instance
**
*Instance, name=Part-2-1, part=Part-2
          0.,           0.,          0.2
**
*uel property,elset=beam2
<Gshear>,<Kbulk>,<Mx>,<My>,<Mz>,<nInt>
**
** Dummy mesh material properties
**
*Solid section, elset=ElDummy2, material=Material-2
*End Instance
**
*Nset, nset=BC_bottom, instance=Part-1-1, generate
 49,  52,   1
** Constraint: Constraint-1
*Tie, name=Constraint-1, adjust=yes
Part-2-1.Bondstrip, Part-1-1.BondBase
*End Assembly
************************************************************************
**			MATERIAL DEFINITION
************************************************************************
**
*Material, name=Material-1
*Elastic
1.e-20
*Conductivity
1.0
*Density
1.0
**
*Material, name=Material-2
*Elastic
1.e-20
*Density
2500.e-12
**
**
** INTERACTION PROPERTIES
**
*Surface Interaction, name=IntProp-1
1.,
*Friction, slip tolerance=0.005
 0.2,
************************************************************************
**			INITIAL CONDITIONS
************************************************************************
**
**
*Initial conditions, type=field, variable=1
Part-1-1.Nall,<magFieldVecX>
*Initial conditions, type=field, variable=2
Part-1-1.Nall,<magFieldVecY>
*Initial conditions, type=field, variable=3
Part-1-1.Nall,<magFieldVecZ>
*Initial conditions, type=field, variable=4
Part-1-1.Nall,<magFieldMag>
*Initial conditions, type=field, variable=1
Part-2-1.Nall2,<magFieldVecX>
*Initial conditions, type=field, variable=2
Part-2-1.Nall2,<magFieldVecY>
*Initial conditions, type=field, variable=3
Part-2-1.Nall2,<magFieldVecZ>
*Initial conditions, type=field, variable=4
Part-2-1.Nall2,<magFieldMag>
**
**
** BOUNDARY CONDITIONS
**
** Name: BC-1 Type: Symmetry/Antisymmetry/Encastre
*Boundary
BC_bottom, ENCASTRE
**
** INTERACTIONS
**
** Interaction: Int-1
*Contact Pair, interaction=IntProp-1, type=SURFACE TO SURFACE
Part-2-1.contstrip, Part-1-1.contbase
**
** CONTACT INITIALIZATION DATA
**
*Contact Initialization Data, name=CInit-1
************************************************************************
**			AMPLITUDE DEFINITION
************************************************************************
*Amplitude, name=magFieldMagAmp
0.0,0.0,1.,<magFieldMag>
**			AMPLITUDE DEFINITION
************************************************************************
*Amplitude, name=magFieldMagAmp0
0.0,0.0,1.,<magFieldMag1>
************************************************************************
************************************************************************
** ----------------------------------------------------------------
**
**			STEP DEFINITION
************************************************************************
*Step, Name=Deform0, nlgeom=yes, inc=100000
*Static
0.2,1.,1.e-12,1.
*Controls, Parameters=Time Incrementation
,,,,,,,10,,,,,,
**
** Interaction: Int-1
*Model Change, type=CONTACT PAIR, remove
Part-2-1.contstrip, Part-1-1.contbase
**
** Name: BC-2 Type: Displacement/Rotation
*Boundary
Part-2-1.strippool, 3, 3, 0.5
**
*Field, variable=1
Part-1-1.Nall,<magFieldVecX>
*Field, variable=2
Part-1-1.Nall,<magFieldVecY>
*Field, variable=3
Part-1-1.Nall,<magFieldVecZ>
*Field, variable=4, amplitude=magFieldMagAmp0
Part-1-1.Nall,1.0
*Field, variable=1
Part-2-1.Nall2,<magFieldVecX>
*Field, variable=2
Part-2-1.Nall2,<magFieldVecY>
*Field, variable=3
Part-2-1.Nall2,<magFieldVecZ>
*Field, variable=4, amplitude=magFieldMagAmp0
Part-2-1.Nall2,1.0
**
*End Step
**			STEP DEFINITION
************************************************************************
*Step, Name=Deform, nlgeom=yes, inc=100000
*Static
0.2,1.,1.e-6,1.
*Controls, Parameters=Time Incrementation
,,,,,,,10,,,,,,
** BOUNDARY CONDITIONS
**
** Name: BC-1 Type: Symmetry/Antisymmetry/Encastre
*Boundary, op=NEW
BC_bottom, ENCASTRE
**
** define Dload to include gravity
*Dload
, GRAV, 10000, 0., 0., -1.
** Name: BC-2 Type: Displacement/Rotation
*Boundary, op=NEW
**
** INTERACTIONS
**
** Interaction: Int-1
*Model Change, type=CONTACT PAIR, add
Part-2-1.contstrip, Part-1-1.contbase
**
*Field, variable=1
Part-1-1.Nall,<magFieldVecX>
*Field, variable=2
Part-1-1.Nall,<magFieldVecY>
*Field, variable=3
Part-1-1.Nall,<magFieldVecZ>
*Field, variable=4, amplitude=magFieldMagAmp
Part-1-1.Nall,1.0
**
*End Step
