*Heading
** Job name: Job-2 Model name: Model-1
** Generated by: Abaqus/CAE 2020
*Preprint, echo=NO, model=NO, history=NO, contact=NO
**
** PARTS
**
*Part, name=Part-1
*End Part
**
**
** ASSEMBLY
**
*Assembly, name=Assembly
**
*Instance, name=Part-1-1, part=Part-1
*Node
      1,  -4.59807634,          1.5,  0.200000003
      2,  -3.59807634,    3.2320509,  0.200000003
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*Element, type=C3D8
  1,  126,  919, 2821,  901,    1,   61,  775,   92
  2,  919,  920, 2822, 2821,   61,   62,  776,  775
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*Nset, nset=Set-1, generate
    1,  3672,     1
*Elset, elset=Set-1, generate
    1,  2158,     1
*Nset, nset=P1
   25,   27,   29,   30,   31,   32
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*Elset, elset=P1
  641,  642,  643,  644,  645,  646
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*Nset, nset=Set-3
   31,   32,   35,   36,   37,   38
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*Elset, elset=Set-3
  801,  802,  803,  804,  805,  806
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*Nset, nset=Set-42, generate
    1,  3672,     1
*Elset, elset=Set-42, generate
    1,  2158,     1
** Section: Section-1
*Solid Section, elset=Set-42, material=Material-1
,
*End Instance
**
*Nset, nset=HexNodes, instance=Part-1-1
  11,  12,  14,  15,  19,  21
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*Nset, nset=Set-31, instance=Part-1-1
  6,  7, 40, 41, 43, 45, 47, 48, 51, 52, 57, 58
*Nset, nset=Set-33, instance=Part-1-1
  6,  7, 43, 45, 47, 48, 51, 52, 57, 58
*Nset, nset=Set-34, instance=Part-1-1
 40, 41
*Elset, elset=U3, instance=Part-1-1
  641,  642,  643,  644,  645,  646
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*Elset, elset=U4, instance=Part-1-1
  801,  802,  803,  804,  805,  806
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*Elset, elset=U5, instance=Part-1-1
    1,    2,    3,    4,    5,    6
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*Elset, elset=U6, instance=Part-1-1
  161,  162,  163,  164,  165,  166
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*Elset, elset=U7, instance=Part-1-1
  321,  322,  323,  324,  325,  326
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*Elset, elset=U8, instance=Part-1-1
  481,  482,  483,  484,  485,  486
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*End Assembly
**
** MATERIALS
**
*Material, name=Material-1
*Elastic
 3e+07, 0.3
** ----------------------------------------------------------------
**
** STEP: Step-1
**
*Step, name=Step-1, nlgeom=NO
*Static
1., 1., 1e-05, 1.
**
** BOUNDARY CONDITIONS
**
** Name: BC-1 Type: Symmetry/Antisymmetry/Encastre
*Boundary
Set-33, ZSYMM
** Name: BC-2 Type: Symmetry/Antisymmetry/Encastre
*Boundary
Set-34, ENCASTRE
**
** OUTPUT REQUESTS
**
*Restart, write, frequency=0
**
** FIELD OUTPUT: F-Output-1
**
*Output, field, variable=PRESELECT
**
** HISTORY OUTPUT: H-Output-1
**
*Output, history, variable=PRESELECT
*End Step
