*Heading
Three-dimensional magnetic body
************************************************************************
** this input file is for UEL subroutine uMag.for
**    1. user needs to define applied magnetic field:
**       unit directional vector and magnitude.
**    2. user needs to define material's mechanical properties:
**       shear modulus (Gshear) and bulk modulus (Kbulk).
**    3. user needs to define material's magnetic moment density:
**       components along x,y,z directions.
**
**	UNITS:	Length - meters, Force - Newtons,
**		Stress - Newton/meter^2 = Pa, Mass - kilograms,
**		Density - kg/meter^3, Energy - Joules
**
**  model description:
**  beam actuation with single magnetization direction (1,0,0)
**  and applied magnetic field along (0,1,0)
**
**  Implemented in Abaqus 2016
**  Created by Ruike Zhao, 2017
**  Please refer to paper "Printing ferromagnetic domains
**  for untethered fast-transforming soft materials, Nature(2018)"
************************************************************************
*Parameter
**
** final magnitude of the applied magnetic field (Tesla)
magFieldMag = 0.00015
**
** applied magnetic field unit vector
magFieldVecX = 0.0
magFieldVecY = 0.0
magFieldVecZ = 1.0
**
**	MATERIAL PARAMETERS
**
** initial magnetic moment density (A/m)
Mx = 100.0
My = 0.0
Mz = 0.0
**
** initial shear modulus (Pa)
Gshear = 0.33
**
** bulk modulus (Pa)
Kbulk = 1000.0*Gshear
**
** number of body integration points
nInt = 8
**
** number of real material properties
nProps = 5
**
** number of integer material properties
nJProps = 1
**
************************************************************************
**		MODEL DEFINITION
************************************************************************
**
*Node, nset=Nall
      1,   7.19615221,           3.,  0.200000003
      2,           2.,           0.,  0.200000003
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*User Element,Nodes=8,Type=U3,Iproperties=<nJProps>,Properties=<nProps>,Coordinates=3,Unsymm
1,2,3
*Element, type=U3
 7,  424,  425,  987,  986,   42,   43,  397,  396
 8,  425,  426,  988,  987,   43,   44,  398,  397
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*User Element,Nodes=8,Type=U9,Iproperties=<nJProps>,Properties=<nProps>,Coordinates=3,Unsymm
1,2,3
*Element, type=U9
 97,  501,  502, 1021, 1016,   98,   99,  486,  485
 98,  502,  103,  498, 1021,   99,    9,  100,  486
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*User Element,Nodes=8,Type=U7,Iproperties=<nJProps>,Properties=<nProps>,Coordinates=3,Unsymm
1,2,3
*Element, type=U7
145,  107,  500, 1027,  592,   10,  102,  526,  155
146,  500,  499, 1028, 1027,  102,  101,  527,  526
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*User Element,Nodes=8,Type=U8,Iproperties=<nJProps>,Properties=<nProps>,Coordinates=3,Unsymm
1,2,3
*Element, type=U8
241,  103,  502, 1060,  683,    9,   99,  617,  207
242,  502,  501, 1061, 1060,   99,   98,  618,  617
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*User Element,Nodes=8,Type=U4,Iproperties=<nJProps>,Properties=<nProps>,Coordinates=3,Unsymm
1,2,3
*Element, type=U4
169,  597, 1042, 1045,  598,  150,  541,  544,  149
170, 1042, 1043, 1046, 1045,  541,  542,  545,  544
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*User Element,Nodes=8,Type=U5,Iproperties=<nJProps>,Properties=<nProps>,Coordinates=3,Unsymm
1,2,3
*Element, type=U5
265,  688, 1075, 1078,  689,  202,  632,  635,  201
266, 1075, 1076, 1079, 1078,  632,  633,  636,  635
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*User Element,Nodes=8,Type=U6,Iproperties=<nJProps>,Properties=<nProps>,Coordinates=3,Unsymm
1,2,3
*Element, type=U6
 1,   90,  419,  981,  413,    1,   37,  391,   60
 2,  419,  420,  982,  981,   37,   38,  392,  391
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*Nset, nset=beam, generate
  1,  1191,   1
*Elset, elset=beam, generate
  1,  624,   1
*Nset, nset=edge
  2, 3, 5, 6, 9, 10,
*Nset, nset=edge0
  11, 12, 13, 14, 15, 16,
*Nset, nset=edge1
 2,
**==========================================================================
** Make the Dummy Mesh
**
*Element, type=C3D8, elset=ElDummy
1001,	90,	419,	981,	413,	1,	37,	391,	60
1002,	419,	420,	982,	981,	37,	38,	392,	391
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**
************************************************************************
**			MATERIAL DEFINITION
************************************************************************
**
** Material properties for the real material
**
*uel property,elset=beam
<Gshear>,<Kbulk>,<Mx>,<My>,<Mz>,<nInt>
**
** Dummy mesh material properties
**
*Solid section, elset=ElDummy, material=Material-2
**
*Material, name=Material-1
*Elastic
1.e-20
*Conductivity
1.0
*Density
1.0
**
*Material, name=Material-2
*Elastic
1.e-20
*Density
2500.e-12
**
************************************************************************
**			INITIAL CONDITIONS
************************************************************************
**
**
*Initial conditions, type=field, variable=1
Nall,<magFieldVecX>
*Initial conditions, type=field, variable=2
Nall,<magFieldVecY>
*Initial conditions, type=field, variable=3
Nall,<magFieldVecZ>
*Initial conditions, type=field, variable=4
Nall,<magFieldMag>
**
************************************************************************
**			AMPLITUDE DEFINITION
************************************************************************
*Amplitude, name=magFieldMagAmp
0.0,0.0,1.,<magFieldMag>
**
************************************************************************
**			STEP DEFINITION
************************************************************************
*Step, Name=Deform, nlgeom=yes, inc=100000
*Static
0.2,1.,1.e-6,1.
*Controls, Parameters=Time Incrementation
,,,,,,,10,,,,,,
**
************************************************************************
**			BOUNDARY CONDITIONS
************************************************************************
** BOUNDARY CONDITIONS
**
** Name: fix-edge Type: Symmetry/Antisymmetry/Encastre
*Boundary
edge1, ENCASTRE
** Name: fix-edge0 Type: Symmetry/Antisymmetry/Encastre
*Boundary
edge0, ENCASTRE
** Name: fix-edge2 Type: Symmetry/Antisymmetry/Encastre
*Boundary
edge, ENCASTRE
**
** define Dload to include gravity
*Dload
, GRAV, 10000, 0., 0., -1.
** ----------------------------------------------------------------
**
*Field, variable=1
Nall,<magFieldVecX>
*Field, variable=2
Nall,<magFieldVecY>
*Field, variable=3
Nall,<magFieldVecZ>
*Field, variable=4, amplitude=magFieldMagAmp
Nall,1.0
**
**
*Output, field
*node output, nset=Nall
u
*element output, elset=ElDummy
le,ne
**
*End Step
