*Heading
** Job name: Job-4 Model name: Model-1
** Generated by: Abaqus/CAE 2020
*Preprint, echo=NO, model=NO, history=NO, contact=NO
**
** PARTS
**
*Part, name=Part-1
*Node
      1,           0.,          -2.,           0.
      2,           0.,          -2.,  0.200000003
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*Element, type=C3D8IH
  1,  90, 102, 596, 497,   1,   2,  33,  50
  2, 497, 596, 597, 498,  50,  33,  34,  49
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*Nset, nset=Set-1, generate
    1,  2080,     1
*Elset, elset=Set-1, generate
   1,  960,    1
*Nset, nset=edge
  11,  12,  14,  15,  29,  30
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*Elset, elset=edge
 130, 140, 150, 160, 170, 180
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*Elset, elset=edge1
 130, 140, 150, 160, 170, 180
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*Nset, nset=edge_encastle
 14, 15, 31, 32
*Nset, nset=edge_ZYMM
  31,  32, 151, 152, 153, 154
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** Section: Section-1
*Solid Section, elset=Set-1, material=Material-1
,
*End Part
**
**
** ASSEMBLY
**
*Assembly, name=Assembly
**
*Instance, name=Part-1-1, part=Part-1
*End Instance
**
*Nset, nset=Bound_nodes, instance=Part-1-1
 14, 15, 31, 32
*Elset, elset=U3, instance=Part-1-1, generate
 361,  600,    1
*Elset, elset=U4, instance=Part-1-1
 121, 122, 123, 124, 125, 126
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*Elset, elset=U5, instance=Part-1-1
 241, 242, 243, 244, 245, 246
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*Elset, elset=U6, instance=Part-1-1
   1,   2,   3,   4,   5,   6
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*Elset, elset=edge_element, instance=Part-1-1
 130, 140, 150, 160, 170, 180
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*End Assembly
**
** MATERIALS
**
*Material, name=Material-1
*Density
78.,
**
** BOUNDARY CONDITIONS
**
** Name: BC-1 Type: Symmetry/Antisymmetry/Encastre
*Boundary
Part-1-1.edge, ENCASTRE
** ----------------------------------------------------------------
**
** STEP: Step-1
**
*Step, name=Step-1, nlgeom=NO
*Static
1., 1., 1e-05, 1.
**
** BOUNDARY CONDITIONS
**
** Name: BC-1 Type: Symmetry/Antisymmetry/Encastre
*Boundary, op=NEW
**
** OUTPUT REQUESTS
**
*Restart, write, frequency=0
**
** FIELD OUTPUT: F-Output-1
**
*Output, field, variable=PRESELECT
**
** HISTORY OUTPUT: H-Output-1
**
*Output, history, variable=PRESELECT
*End Step
