*Heading
** Job name: Job-1 Model name: Model-1
** Generated by: Abaqus/CAE 2020
*Preprint, echo=NO, model=NO, history=NO, contact=NO
**
** PARTS
**
*Part, name=Part-1
*Node
      1,          -5.,          -2.,           0.
      2,         -3.5,         -3.5,           0.
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*Element, type=C3D8IH
 1,  619,  620, 1905, 1901,   60,   61,  590,  589
 2,  620,   69,  612, 1905,   61,    1,   62,  590
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*Nset, nset=Set-1, generate
    1,  2424,     1
*Elset, elset=Set-1, generate
    1,  1448,     1
*Nset, nset=U3
    2,    3,    5,    6,    9,   10
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*Elset, elset=U3
 187, 188, 189, 190, 191, 192
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*Nset, nset=U4
    1,    2,    4,    5,    7,    8
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*Elset, elset=U4
   65,   66,   67,   68,   69,   70
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*Nset, nset=U5
    1,    2,    3,    4,    5,    6
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*Elset, elset=U5
    1,    2,    3,    4,    5,    6
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*Nset, nset=U6
    2,    5,    7,    8,   13,   14
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*Elset, elset=U6
  251,  252,  253,  254,  255,  256
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*Nset, nset=edge1
  3,  6, 76
*Nset, nset=edge
    2,    5,    7,    8,   15,   17
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** Section: Section-1
*Solid Section, elset=Set-1, material=Material-1
,
*End Part
**
**
** ASSEMBLY
**
*Assembly, name=Assembly
**
*Instance, name=Part-1-1, part=Part-1
*End Instance
**
*End Assembly
**
** MATERIALS
**
*Material, name=Material-1
*Density
78.,
**
** BOUNDARY CONDITIONS
**
** Name: BC-1 Type: Symmetry/Antisymmetry/Encastre
*Boundary
Part-1-1.edge1, ZSYMM
