*Heading
** Job name: Job-1 Model name: Model-1
** Generated by: Abaqus/CAE 2020
*Preprint, echo=NO, model=NO, history=NO, contact=NO
**
** PARTS
**
*Part, name=Part-1
*Node
      1,           0.,           1.,  0.200000003
      2,           0.,          -1.,  0.200000003
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*Element, type=C3D8R
  1,  122,  773, 2290,  749,    1,   29,  485,   74
  2,  773,  774, 2291, 2290,   29,   30,  486,  485
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*Nset, nset=U3
    1,    2,    3,    4,    5,    6
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*Elset, elset=U3
    1,    2,    3,    4,    5,    6
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*Nset, nset=U4
    1,    2,    3,    4,    5,    6
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*Elset, elset=U4
  313,  314,  315,  316,  317,  318
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*Nset, nset=nodezymm
   6,   7,  11,  12,  98,  99
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*Nset, nset=nodecastre
  17,  24, 332, 333, 334, 335, 336, 337, 338, 339, 340, 341, 342
*End Part
**
**
** ASSEMBLY
**
*Assembly, name=Assembly
**
*Instance, name=Part-1-1, part=Part-1
*End Instance
**
*End Assembly
**
** MATERIALS
**
*Material, name=Material-1
*Density
0.,
