*Heading
** Job name: Job-1 Model name: Model-1
** Generated by: Abaqus/CAE 2020
*Preprint, echo=NO, model=NO, history=NO, contact=NO
**
** PARTS
**
*Part, name=Part-1
*Node
      1,         -2.5,          -1.,           0.
      2,         -2.5,          -1.,  0.200000003
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*Element, type=C3D8R
  1,  186, 1269, 2190,  455,    1,   13,  381,   88
  2, 1269,  198,  862, 2190,   13,    2,   14,  381
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*Nset, nset=U3
    1,    2,    3,    4,    5,    6
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*Elset, elset=U3, generate
   1,  912,    1
*Nset, nset=U4
    1,    2,    5,    8,    9,   10
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*Elset, elset=U4, generate
  913,  1824,     1
*Nset, nset=edge
    2,    5,  198,  199,  200,  201,  202,  203,  204,  205,  206,  208, 1278
*Nset, nset=edge_1node
 5,
*Nset, nset=edge_NONrotaion
 192, 214
*End Part
**
**
** ASSEMBLY
**
*Assembly, name=Assembly
**
*Instance, name=Part-1-1, part=Part-1
*End Instance
**
*End Assembly
**
** MATERIALS
**
*Material, name=Material-1
*Density
0.,
**
** BOUNDARY CONDITIONS
**
** Name: BC-1 Type: Symmetry/Antisymmetry/Encastre
*Boundary
Part-1-1.edge, ENCASTRE
** Name: BC-2 Type: Symmetry/Antisymmetry/Encastre
*Boundary
Part-1-1.edge_1node, XSYMM
** Name: BC-3 Type: Symmetry/Antisymmetry/Encastre
*Boundary
Part-1-1.edge_NONrotaion, ZSYMM
