*Heading
** Job name: Job-1 Model name: Model-1
** Generated by: Abaqus/CAE 2020
*Preprint, echo=NO, model=NO, history=NO, contact=NO
**
** PARTS
**
*Part, name=Part-1
*Node
      1,         -1.5,           6.,  0.200000003
      2,         -1.5,           6.,           0.
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*Element, type=C3D8R
 1,  852,  853, 2239, 2236,  123,  124,  846,  845
 2,  853,  854, 2240, 2239,  124,  125,  847,  846
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*Nset, nset=U3_x
    1,    2,    3,    4,    5,    6
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*Elset, elset=U3_x
   39,   40,   41,   42,   43,   44
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*Nset, nset=U4_y
    1,    2,    3,    4,    5,    6
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*Elset, elset=U4_y
    1,    2,    3,    4,    5,    6
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*Nset, nset=U5_nx
    7,    8,    9,   10,   13,   14
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*Elset, elset=U5_nx
  179,  180,  181,  182,  183,  184
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*Nset, nset=U6_ny
    8,   10,   11,   12,   15,   18
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*Elset, elset=U6_ny
  497,  498,  499,  500,  501,  502
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*Nset, nset=Set-9, generate
    1,  2760,     1
*Elset, elset=Set-9, generate
    1,  1600,     1
*Nset, nset=edge
 15, 25, 42, 65
** Section: Section-1
*Solid Section, elset=Set-9, material=Material-1
,
*End Part
**
**
** ASSEMBLY
**
*Assembly, name=Assembly
**
*Instance, name=Part-1-1, part=Part-1
*End Instance
**
*End Assembly
**
** MATERIALS
**
*Material, name=Material-1
*Density
2.,
