*Heading
** Job name: Job-1 Model name: Model-1
** Generated by: Abaqus/CAE 2020
*Preprint, echo=NO, model=NO, history=NO, contact=NO
**
** PARTS
**
*Part, name=Part-1
*Node
      1,           0.,          1.5,  0.200000003
      2,           0.,          1.5,           0.
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*Element, type=C3D8
  1, 1973, 1974, 5686, 5651,  258,  259, 1942, 1941
  2, 1974, 1975, 5687, 5686,  259,  260, 1943, 1942
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*Nset, nset=Set-1, generate
    1,  8340,     1
*Elset, elset=Set-1, generate
    1,  6030,     1
*Nset, nset=edge
  205,  208,  211,  219, 1525, 1581, 1665, 1667, 1726, 1728, 1735, 1883
** Section: Section-1
*Solid Section, elset=Set-1, material=Material-1
,
*End Part
**
**
** ASSEMBLY
**
*Assembly, name=Assembly
**
*Instance, name=Part-1-1, part=Part-1
*End Instance
**
*Nset, nset=Intersect, instance=Part-1-1
    7,    9,   16,   20,   26,   36
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*Nset, nset=U3, instance=Part-1-1
    1,    2,    5,    6,    7,    9
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*Elset, elset=U3, instance=Part-1-1
  171,  172,  173,  174,  175,  176
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*Nset, nset=U4, instance=Part-1-1
    7,    8,    9,   10,   16,   17
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*Elset, elset=U4, instance=Part-1-1
 1936, 1937, 1938, 1939, 1940, 1941
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*Nset, nset=U5, instance=Part-1-1
    1,    2,    3,    4,    5,    6
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*Elset, elset=U5, instance=Part-1-1
    1,    2,    3,    4,    5,    6
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*Nset, nset=U6, instance=Part-1-1
    3,    4,    7,    9,   15,   16
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*Elset, elset=U6, instance=Part-1-1
 2106, 2107, 2108, 2109, 2110, 2111
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*End Assembly
**
** MATERIALS
**
*Material, name=Material-1
*Density
2.,
